M := 10^6
u := 10^-6
n := 10^-9
k := 10^3
Fcpu := 480*M
Tcpu := 1/Fcpu = 2.08333 n
Top := 2.76*u
# Thu Oct 08, 2020 11:38:44: reset CCTIMER1=0
#
# Thu Oct 08, 2020 11:38:44: CYCLECOUNTER=509251627
#
# Thu Oct 08, 2020 11:38:44: CCTIMER1=134554
#
# Thu Oct 08, 2020 11:38:44: Breakpoint hit: Code @ DIV_mdl.cpp:70.32, type: default (auto)
#
# Thu Oct 08, 2020 11:39:33: reset CCTIMER1=0
#
# Thu Oct 08, 2020 11:39:33: CYCLECOUNTER=509410813
#
# Thu Oct 08, 2020 11:39:33: CCTIMER1=2628
#
# Thu Oct 08, 2020 11:39:33: Breakpoint hit: Code @ DIV_mdl.cpp:70.32, type: default (auto)
#
# Thu Oct 08, 2020 11:39:45: reset CCTIMER1=0
#
# Thu Oct 08, 2020 11:39:46: CYCLECOUNTER=509412160
#
# Thu Oct 08, 2020 11:39:46: CCTIMER1=1177
#
# Thu Oct 08, 2020 11:39:46: Breakpoint hit: Code @ DIV_mdl.cpp:70.32, type: default (auto)
#
# Thu Oct 08, 2020 11:39:51: reset CCTIMER1=0
#
# Thu Oct 08, 2020 11:39:51: CYCLECOUNTER=509415977
#
# Thu Oct 08, 2020 11:39:51: CCTIMER1=3651
#
# Thu Oct 08, 2020 11:39:51: Breakpoint hit: Code @ DIV_mdl.cpp:70.32, type: default (auto)
#
# Thu Oct 08, 2020 11:39:55: reset CCTIMER1=0
#
# Thu Oct 08, 2020 11:39:55: CYCLECOUNTER=509417350
#
# Thu Oct 08, 2020 11:39:55: CCTIMER1=1214
#
# Thu Oct 08, 2020 11:39:55: Breakpoint hit: Code @ DIV_mdl.cpp:70.32, type: default (auto)
#
# Thu Oct 08, 2020 11:39:58: reset CCTIMER1=0
#
# Thu Oct 08, 2020 11:39:58: CYCLECOUNTER=509419937
#
# Thu Oct 08, 2020 11:39:58: CCTIMER1=2423
#
# Thu Oct 08, 2020 11:39:58: Breakpoint hit: Code @ DIV_mdl.cpp:70.32, type: default (auto)
#
# Thu Oct 08, 2020 11:39:59: reset CCTIMER1=0
#
# Thu Oct 08, 2020 11:39:59: CYCLECOUNTER=509421306
#
# Thu Oct 08, 2020 11:39:59: CCTIMER1=1181
#
# Thu Oct 08, 2020 11:39:59: Breakpoint hit: Code @ DIV_mdl.cpp:70.32, type: default (auto)
#
# Thu Oct 08, 2020 11:40:01: reset CCTIMER1=0
#
# Thu Oct 08, 2020 11:40:01: CYCLECOUNTER=509426284
#
# Thu Oct 08, 2020 11:40:01: CCTIMER1=4814
#
# Thu Oct 08, 2020 11:40:01: Breakpoint hit: Code @ DIV_mdl.cpp:70.32, type: default (auto)
#
# Thu Oct 08, 2020 11:40:02: reset CCTIMER1=0
#
# Thu Oct 08, 2020 11:40:03: CYCLECOUNTER=509427686
#
# Thu Oct 08, 2020 11:40:03: CCTIMER1=1211
#
# Thu Oct 08, 2020 11:40:03: Breakpoint hit: Code @ DIV_mdl.cpp:70.32, type: default (auto)
#
# Thu Oct 08, 2020 11:40:03: reset CCTIMER1=0
#
# Thu Oct 08, 2020 11:40:04: CYCLECOUNTER=509430274
#
# Thu Oct 08, 2020 11:40:04: CCTIMER1=2424
#
# Thu Oct 08, 2020 11:40:04: Breakpoint hit: Code @ DIV_mdl.cpp:70.32, type: default (auto)
#
# Thu Oct 08, 2020 11:40:05: reset CCTIMER1=0
#
# Thu Oct 08, 2020 11:40:05: CYCLECOUNTER=509431672
#
# Thu Oct 08, 2020 11:40:05: CCTIMER1=1227
#
# Thu Oct 08, 2020 11:40:05: Breakpoint hit: Code @ DIV_mdl.cpp:70.32, type: default (auto)
#
# Thu Oct 08, 2020 11:40:06: reset CCTIMER1=0
#
# Thu Oct 08, 2020 11:40:06: CYCLECOUNTER=509435390
#
# Thu Oct 08, 2020 11:40:06: CCTIMER1=3557
#
# Thu Oct 08, 2020 11:40:06: Breakpoint hit: Code @ DIV_mdl.cpp:70.32, type: default (auto)
#
# Thu Oct 08, 2020 11:40:07: reset CCTIMER1=0
#
# Thu Oct 08, 2020 11:40:07: CYCLECOUNTER=509436757
#
# Thu Oct 08, 2020 11:40:07: CCTIMER1=1183
#
# Thu Oct 08, 2020 11:40:07: Breakpoint hit: Code @ DIV_mdl.cpp:70.32, type: default (auto)
#
# Thu Oct 08, 2020 11:40:09: reset CCTIMER1=0
#
# Thu Oct 08, 2020 11:40:09: CYCLECOUNTER=509439340
#
# Thu Oct 08, 2020 11:40:09: CCTIMER1=2417
#
# Thu Oct 08, 2020 11:40:09: Breakpoint hit: Code @ DIV_mdl.cpp:70.32, type: default (auto)
#
# Thu Oct 08, 2020 11:40:10: reset CCTIMER1=0
#
# Thu Oct 08, 2020 11:40:10: CYCLECOUNTER=509440710
#
# Thu Oct 08, 2020 11:40:10: CCTIMER1=1197
#
# Thu Oct 08, 2020 11:40:10: Breakpoint hit: Code @ DIV_mdl.cpp:70.32, type: default (auto)
#
# Thu Oct 08, 2020 11:40:12: reset CCTIMER1=0
#
# Thu Oct 08, 2020 11:40:12: CYCLECOUNTER=509446730
#
# Thu Oct 08, 2020 11:40:12: CCTIMER1=5854
#
# Thu Oct 08, 2020 11:40:12: Breakpoint hit: Code @ DIV_mdl.cpp:70.32, type: default (auto)
#
# Thu Oct 08, 2020 11:40:21: reset CCTIMER1=0
#
# Thu Oct 08, 2020 11:40:21: CYCLECOUNTER=509448146
#
# Thu Oct 08, 2020 11:40:21: CCTIMER1=1205
#
# Thu Oct 08, 2020 11:40:21: Breakpoint hit: Code @ DIV_mdl.cpp:70.32, type: default (auto)
#
# Thu Oct 08, 2020 11:40:22: reset CCTIMER1=0
#
# Thu Oct 08, 2020 11:40:22: CYCLECOUNTER=509450714
#
# Thu Oct 08, 2020 11:40:22: CCTIMER1=2415
#
# Thu Oct 08, 2020 11:40:22: Breakpoint hit: Code @ DIV_mdl.cpp:70.32, type: default (auto)
#
# Thu Oct 08, 2020 11:40:24: reset CCTIMER1=0
#
# Thu Oct 08, 2020 11:40:24: CYCLECOUNTER=509452031
#
# Thu Oct 08, 2020 11:40:24: CCTIMER1=1163
#
# Thu Oct 08, 2020 11:40:24: Breakpoint hit: Code @ DIV_mdl.cpp:70.32, type: default (auto)
#
# Thu Oct 08, 2020 11:40:26: reset CCTIMER1=0
#
# Thu Oct 08, 2020 11:40:26: CYCLECOUNTER=509455726
#
# Thu Oct 08, 2020 11:40:26: CCTIMER1=3521
#
# Thu Oct 08, 2020 11:40:26: Breakpoint hit: Code @ DIV_mdl.cpp:70.32, type: default (auto)
#
# Thu Oct 08, 2020 11:40:27: reset CCTIMER1=0
#
# Thu Oct 08, 2020 11:40:27: CYCLECOUNTER=509457090
#
# Thu Oct 08, 2020 11:40:27: CCTIMER1=1190
#
# Thu Oct 08, 2020 11:40:27: Breakpoint hit: Code @ DIV_mdl.cpp:70.32, type: default (auto)
#
# Thu Oct 08, 2020 11:40:28: reset CCTIMER1=0
#
# Thu Oct 08, 2020 11:40:28: CYCLECOUNTER=509459617
#
# Thu Oct 08, 2020 11:40:28: CCTIMER1=2373
#
# Thu Oct 08, 2020 11:40:28: Breakpoint hit: Code @ DIV_mdl.cpp:70.32, type: default (auto)
#
# Thu Oct 08, 2020 11:40:29: reset CCTIMER1=0
#
# Thu Oct 08, 2020 11:40:29: CYCLECOUNTER=509460946
#
# Thu Oct 08, 2020 11:40:29: CCTIMER1=1165
#
# Thu Oct 08, 2020 11:40:29: Breakpoint hit: Code @ DIV_mdl.cpp:70.32, type: default (auto)
N := Top/Tcpu = 1324.8
Nop := 400
T := Nop*Tcpu = 0.833333 u
